mass 1 26.982

group Al type 1

pair_style eam/alloy
pair_coeff * * /home/sullberg/repos/pypospack/examples/Al__eam__born_exp_fs/pareto_optimization_3.5NN/rank_0/Al_fcc.lmps_elastic/Al.eam.alloy Al

neighbor 1.0 bin
neigh_modify every 1 delay 0 check yes
thermo	1
thermo_style custom step temp pe press pxx pyy pzz pxy pxz pyz lx ly lz vol
thermo_modify norm no
