mass 1 58.6934

group Ni type 1

pair_style eam/alloy
pair_coeff * * /Users/eugeneragasa/pyflamestk_git/pypospack/tests/tests_integration/task/lammps/LammpsPositionMinimization/Ni_fcc_min.E_min_pos/Ni.eam.alloy Ni

neighbor 1.0 bin
neigh_modify every 1 delay 0 check yes
